*Heading
** Job name: 500unit Model name: Model-1
** Generated by: Abaqus/CAE 6.14-2
*Preprint, echo=NO, model=NO, history=NO, contact=NO
**
** PARTS
**
*Part, name=Part-1
*Node
      1,           0., 0.0808029622
      2,           0.,  0.072722666
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*Element, type=CPS4I
  1,   1,   2,  13,  12
  2,   2,   3,  14,  13
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*Nset, nset=Set-1, generate
   1,  561,    1
*Elset, elset=Set-1, generate
   1,  500,    1
** Section: Section-1
*Solid Section, elset=Set-1, material=Material-1
,
*End Part
**
**
** ASSEMBLY
**
*Assembly, name=Assembly
**
*Instance, name=Part-1-1, part=Part-1
*End Instance
**
*Nset, nset=Set-1, instance=Part-1-1, generate
  1,  11,   1
*Elset, elset=Set-1, instance=Part-1-1, generate
  1,  10,   1
*Elset, elset=_Surf-1_S4, internal, instance=Part-1-1, generate
   1,  491,   10
*Surface, type=ELEMENT, name=Surf-1
_Surf-1_S4, S4
*Elset, elset=_Surf-2_S4, internal, instance=Part-1-1, generate
   1,  491,   10
*Surface, type=ELEMENT, name=Surf-2
_Surf-2_S4, S4
*End Assembly
**
** MATERIALS
**
*Material, name=Material-1
*Density
7800.,
*Elastic
 2.1e+11, 0.3
** ----------------------------------------------------------------
**
** STEP: Step-1
**
*Step, name=Step-1, nlgeom=NO
20unit
*Static
1., 1., 1e-05, 1.
**
** BOUNDARY CONDITIONS
**
** Name: BC-1 Type: 对称/反对称/完全固定
*Boundary
Set-1, ENCASTRE
**
** LOADS
**
** Name: Load-1   Type: Pressure
*Dsload
Surf-2, P, 1e+06
**
** OUTPUT REQUESTS
**
*Restart, write, frequency=0
**
** FIELD OUTPUT: F-Output-1
**
*Output, field, variable=PRESELECT
**
** HISTORY OUTPUT: H-Output-1
**
*Output, history, variable=PRESELECT
*End Step
